*Heading
** Job name: Job-1 Model name: Model-1
** Generated by: Abaqus/CAE 2020
*Preprint, echo=NO, model=NO, history=NO, contact=NO
**
** define nodes
*Include, input=../model_Node.inp
**
** define elements
*User element, type=U1111, unsymm, nodes=4, coordinates=2, properties=11, variables=150
1,2
1,4,5
*Element, type=U1111
*Include, input=../model_Elem.inp
*Uel property, elset=allelem
0.310143778, 0.2977, 0.5, 0.667, 4612.05, 4.883e-3, 4.883e-3, 0.0,
0.0, 3000.0,0.20
**
*Amplitude, name=Amp-1
0.0, 1.0, 1.0, 1.0
**
** material definition for ghost elements
*Material, name=ghost1
*Depvar
15
*User Material, constants=0
** ----------------------------------------------------------------
**
** STEP: Step-1
**
*Step, name=Step-1, nlgeom=NO, inc=1000000, unsymm=YES
*Dynamic,direct,nohaf,alpha=0.0,beta=0.3025,gamma=0.6
4.98e-4,0.1494,
**
** BOUNDARY CONDITIONS
**
** Name: BC-1 Type: Displacement/Rotation
*Boundary
sides,1,1
sides,4,4
bot,2,2
bot,5,5
**
**
*Cload, amplitude=Amp-1
top, 2, -10
** OUTPUT REQUESTS
**
*Restart, write, frequency=0
**
**
** HISTORY OUTPUT: H-Output-1
**
*Output, history, frequency=1
*Node Output, nset=rcnode
U2, UR2
*Element Output, elset=allelem, directions=YES
SDV2, SDV12
*End Step
